*Heading
File generated by TexGen v3.13.1
************
*** MESH ***
************
*Node
1, -0.5, -0.4, -0.01
2, -0.5, -0.4, 0.15
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*Element, Type=C3D10
1, 49, 16, 89, 90, 1057, 1058, 1059, 1060, 1061, 1062
2, 49, 16, 90, 17, 1057, 1061, 1060, 1063, 1064, 1065
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********************
*** ORIENTATIONS ***
********************
** Orientation vectors
** 1st vector represents the fibre direction
** 2nd vector is an arbitrary vector perpendicular to the first
*Distribution Table, Name=TexGenOrientationVectors
COORD3D,COORD3D
*Distribution, Location=Element, Table=TexGenOrientationVectors, Name=TexGenOrientationVectors, Input=02Gap.ori
*Orientation, Name=TexGenOrientations, Definition=coordinates
TexGenOrientationVectors
1, 0
********************
*** ELEMENT SETS ***
********************
** TexGen generates a number of element sets:
** All - Contains all elements
** Matrix - Contains all elements belonging to the matrix
** YarnX - Where X represents the yarn index
*ElSet, ElSet=All, Generate
1, 4699, 1
*ElSet, ElSet=Matrix
1, 2, 3, 4, 5, 6
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*ElSet, ElSet=Yarn0
11, 12, 13, 22, 48, 49
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*ElSet, ElSet=Yarn1
36, 37, 105, 154, 155, 156
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*ElSet, ElSet=Yarn2
79, 80, 81, 98, 205, 206
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*ElSet, ElSet=Yarn3
64, 65, 66, 114, 115, 116
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*****************
*** MATERIALS ***
*****************
*Material, Name=Mat0
*Elastic
3e+09, 0.2
*Expansion
6.5e-06
*Material, Name=Mat1
*Elastic, type=ENGINEERING CONSTANTS
2e+11, 1e+10, 1e+10, 0.3, 0.4, 0.4, 5e+09, 5e+09
5e+09
*Expansion, type=ORTHO
-2e-07, 3e-06, 3e-06
*Solid Section, ElSet=Matrix, Material=Mat0
1.0,
*Solid Section, ElSet=Yarn0, Material=Mat1, Orientation=TexGenOrientations
1.0,
*Solid Section, ElSet=Yarn1, Material=Mat1, Orientation=TexGenOrientations
1.0,
*Solid Section, ElSet=Yarn2, Material=Mat1, Orientation=TexGenOrientations
1.0,
*Solid Section, ElSet=Yarn3, Material=Mat1, Orientation=TexGenOrientations
1.0,
